units metal
atom_style atomic
boundary p p p
read_data lj32.data

pair_style lj/cut 8.5
pair_coeff 1 1 0.01032 3.405
pair_modify shift yes
timestep 0.002
fix 1 all nve

compute msd_all all msd
thermo 10
run 4000
